FINISH
/CLEAR
/TITLE, Test MAPDL Run
/PREP7
ET, 1, BEAM188
SECTYPE, 1, BEAM, CSOLID
SECDATA, 0.05
MP, EX, 1, 210E9
MP, PRXY, 1, 0.3
K, 1, 0, 0, 0
K, 2, 1, 0, 0
L, 1, 2
ESIZE, 0.1
LMESH, ALL
DK, 1, ALL, 0
FK, 2, FY, -1000
/SOLU
ANTYPE, STATIC
SOLVE
FINISH
/POST1
SET, LAST
*GET, MAX_DEF, NODE, 2, U, Y
/OUTPUT, test_results, txt
*STATUS, MAX_DEF
/OUTPUT
FINISH
/EXIT, NOSAVE
